// SBML level 2 version 4

model main()

  // Compartments:
  compartment c = 1;

  // Species:
  species substrate in c = 0.111/c;  // substance in mole
  species pcoumaric_acid in c = 0;  // substance in mole

  // Parameters:
  vmax_v1 = 0.0075;
  km_v1_gluc = 0.01;
  a = 1.6;
  scale = 1;
  vmax_respiration = 0.35;
  km_respiration_A = 0.03;
  vmax_ppp = 0.05;
  km_ppp_substrate = 0.01;
  vmax_glyc = 0.1;
  km_glyc_substrate = 0.02;
  km_shiki1_pep = 0.02;
  km_shiki1_e4p = 0.02;
  vmax_shiki_step1 = 0.1;
  vmax_shiki_step2 = 0.1;
  km_shiki2_pep = 0.02;
  km_shiki2_dhap = 0.02;
  vmax_product = 0.1;
  km_product_epsp = 0.02;
  vmax_sink2_pep = 0.1;
  vmax_sink1_e4p = 0.1;
  km_sink2_pep = 0.02;
  km_sink1_e4p = 0.02;
  vmax_sink3_epsp = 0.1;
  km_sink3_epsp = 0.02;

  // Reactions:
  v_substrate_product_no_co2: 3 substrate => 2 pcoumaric_acid; c_biomass*substrate*vmax_product*a^(-1)*km_product_epsp^(-1)*(1 + substrate*km_product_epsp^(-1))^(-1);
  v_sink_substrate: substrate => ; substrate*vmax_v1*(km_v1_gluc + substrate)^(-1);
end
