// SBML level 2 version 4

model main()

  // Compartments:
  compartment c = 1;

  // Species:
  species substrate in c = 0.111/c;  // substance in mole
  species c_biomass in c = 0.01/c;  // substance in mole
  species co2 in c = 0;  // substance in mole
  species dhap in c = 0.002/c;  // substance in mole
  species pcoumaric_acid in c = 0;  // substance in mole

  // Parameters:
  vmax_v1 = 0.0075;
  km_v1_gluc = 0.01;
  a = 1.6;
  scale = 1;
  vmax_respiration = 0.35;
  km_respiration_A = 0.03;
  vmax_ppp = 0.05;
  km_ppp_substrate = 0.01;
  vmax_glyc = 0.1;
  km_glyc_substrate = 0.02;
  km_shiki1_pep = 0.02;
  km_shiki1_e4p = 0.02;
  vmax_shiki_step1 = 0.1;
  vmax_shiki_step2 = 0.1;
  km_shiki2_pep = 0.02;
  km_shiki2_dhap = 0.02;
  vmax_product = 0.1;
  km_product_epsp = 0.02;
  vmax_sink2_pep = 0.1;
  vmax_sink1_e4p = 0.1;
  km_sink2_pep = 0.02;
  km_sink1_e4p = 0.02;
  vmax_sink3_epsp = 0.1;
  km_sink3_epsp = 0.02;

  // Reactions:
  v_biomass: 7 substrate => 42 c_biomass; c_biomass*substrate*vmax_v1*a^(-1)*km_v1_gluc^(-1)*(1 + substrate*km_v1_gluc^(-1))^(-1);  // modifiers: co2
  v_respiration: substrate => 6 co2; c_biomass*substrate*vmax_respiration*a^(-1)*km_respiration_A^(-1)*(1 + substrate*km_respiration_A^(-1))^(-1);  // modifiers: c_biomass
  v_substrate_dhap: 7 substrate => 6 dhap; c_biomass*substrate*vmax_shiki_step1*a^(-1)*km_shiki1_pep^(-1)*(1 + substrate*km_shiki1_pep^(-1))^(-1);  // modifiers: c_biomass
  v_dhap_product: 10 dhap => 7 pcoumaric_acid + 7 co2; c_biomass*dhap*vmax_product*a^(-1)*km_product_epsp^(-1)*(1 + dhap*km_product_epsp^(-1))^(-1);  // modifiers: c_biomass
  v_sink_substrate: substrate => ; c_biomass*substrate*vmax_v1*a^(-1)*(km_v1_gluc + substrate)^(-1);  // modifiers: c_biomass
  v_sink_dhap: dhap => ; c_biomass*dhap*vmax_shiki_step2*a^(-1)*(dhap + km_shiki2_dhap)^(-1);  // modifiers: c_biomass
end
