// SBML level 2 version 4

model main()

  // Compartments:
  compartment c = 1;

  // Species:
  species substrate in c = 3.33/c;  // substance in mole
  species c_biomass in c = 0.01/c;  // substance in mole
  species co2 in c = 0;  // substance in mole
  species e4p in c = 0;  // substance in mole
  species pep in c = 0.0224056/c;  // substance in mole
  species dhap in c = 0.002/c;  // substance in mole
  species epsp in c = 0.001/c;  // substance in mole
  species pcoumaric_acid in c = 0;  // substance in mole

  // Parameters:
  vmax_v1 = 0.0075;
  km_v1_gluc = 0.01;
  a = 1.6;
  scale = 1;
  vmax_respiration = 0.35;
  km_respiration_A = 0.03;
  vmax_ppp = 0.05;
  km_ppp_substrate = 0.01;
  vmax_glyc = 0.1;
  km_glyc_substrate = 0.02;
  km_shiki1_pep = 0.02;
  km_shiki1_e4p = 0.02;
  vmax_shiki_step1 = 0.1;
  vmax_shiki_step2 = 0.1;
  km_shiki2_pep = 0.02;
  km_shiki2_dhap = 0.02;
  vmax_product = 0.1;
  km_product_epsp = 0.02;
  vmax_sink2_pep = 0.1;
  vmax_sink1_e4p = 0.1;
  km_sink2_pep = 0.02;
  km_sink1_e4p = 0.02;
  vmax_sink3_epsp = 0.1;
  km_sink3_epsp = 0.02;

  // Reactions:
  v_biomass: 7 substrate => 40 c_biomass + 2 co2; c_biomass*substrate*vmax_v1*a^(-1)*km_v1_gluc^(-1)*(1 + substrate*km_v1_gluc^(-1))^(-1);
  v_respiration: substrate => 6 co2; c_biomass*substrate*vmax_respiration*a^(-1)*km_respiration_A^(-1)*(1 + substrate*km_respiration_A^(-1))^(-1);  // modifiers: c_biomass
  v_ppp: 2 substrate => 3 e4p; c_biomass*substrate*vmax_ppp*a^(-1)*km_ppp_substrate^(-1)*(1 + substrate*km_ppp_substrate^(-1))^(-1);  // modifiers: c_biomass
  v_glyc: substrate => 2 pep; c_biomass*substrate*vmax_glyc*a^(-1)*km_glyc_substrate^(-1)*(1 + substrate*km_glyc_substrate^(-1))^(-1);  // modifiers: c_biomass
  v_shiki_step1: e4p + pep => dhap; c_biomass*e4p*pep*vmax_shiki_step1*a^(-1)*km_shiki1_e4p^(-1)*km_shiki1_pep^(-1)*(1 + e4p*km_shiki1_e4p^(-1))^(-1)*(1 + pep*km_shiki1_pep^(-1))^(-1);  // modifiers: c_biomass
  v_shiki_step2: pep + dhap => epsp; c_biomass*dhap*pep*vmax_shiki_step2*a^(-1)*km_shiki2_dhap^(-1)*km_shiki2_pep^(-1)*(1 + dhap*km_shiki2_dhap^(-1))^(-1)*(1 + pep*km_shiki2_pep^(-1))^(-1);  // modifiers: c_biomass
  v_product: epsp => pcoumaric_acid; c_biomass*epsp*vmax_product*a^(-1)*km_product_epsp^(-1)*(1 + epsp*km_product_epsp^(-1))^(-1);  // modifiers: c_biomass
  v_sink_e4p: e4p => ; c_biomass*e4p*vmax_sink1_e4p*a^(-1)*(e4p + km_sink1_e4p)^(-1);  // modifiers: c_biomass
  v_sink_pep: pep => ; c_biomass*pep*vmax_sink2_pep*a^(-1)*(km_sink2_pep + pep)^(-1);  // modifiers: c_biomass
  v_sink_epsp: epsp => ; c_biomass*epsp*vmax_sink3_epsp*a^(-1)*(epsp + km_sink3_epsp)^(-1);  // modifiers: c_biomass
end
